<Lems>

<Include url="https://raw.githubusercontent.com/borismarin/OpenSourceChaos/geppetto_tests/BaseUnits.xml"/>
<Include url="https://raw.githubusercontent.com/borismarin/OpenSourceChaos/geppetto_tests/SingleSimulation.xml"/>
<Include url="https://raw.githubusercontent.com/borismarin/OpenSourceChaos/geppetto_tests/DoublePendulum.xml"/>

<Target component="sim1"/>

<!-- parameter set for chaotic attractor -->
<DoublePendulum id="dpend" l="1m" m="1kg" g="1m_per_s2"
    theta1_0="1.0" theta2_0="0.0" p1_0="0kg_m2_per_s" p2_0="0kg_m2_per_s"/>

<Simulation id="sim1" length="100s" step="0.05s" target="dpend" method="euler">

    <Display id="d1" title="theta1 timeseries"
        timeScale="1s" xmin="0" xmax="100" ymin="-10" ymax="10">
        <Line id ="th1" quantity="theta1" scale="1" color="#ff0000" timeScale="1s"/>
    </Display>

    <Display id="d2" title="theta2 timeseries"
        timeScale="1s" xmin="0" xmax="100" ymin="-10" ymax="10">
        <Line id ="y" quantity="theta2" scale="1" color="#0000ff" timeScale="1s"/>
    </Display>

    <Display id="d3" title="p1 timeseries"
        timeScale="1s" xmin="0" xmax="100" ymin="-2" ymax="2">
        <Line id ="p1" quantity="p1" scale="1" color="#0000ff" timeScale="1s"/>
    </Display>

    <Display id="d4" title="p2 timeseries"
        timeScale="1s" xmin="0" xmax="100" ymin="-2" ymax="2">
        <Line id ="p2" quantity="p2" scale="1" color="#0000ff" timeScale="1s"/>
    </Display>

</Simulation>

</Lems>
